<?xml version="1.0" encoding="UTF-8"?>
<neuroml xmlns="http://www.neuroml.org/schema/neuroml2"
    xmlns:xsi="http://www.w3.org/2001/XMLSchema-instance"
    xsi:schemaLocation="http://www.neuroml.org/schema/neuroml2 https://raw.github.com/NeuroML/NeuroML2/development/Schemas/NeuroML2/NeuroML_v2beta4.xsd"
    id = "NeuroML2_file_exported_from_NEURON">

  <notes> NeuroML 2 file generated from ModelView by: NEURON -- VERSION 8.0.2 (Fedora 37) master (f0ca745418e942ad4763bdc47459c409f0b11512) 2022-07-22
          Authors: Michael Hines, Sushil Kambampati and Padraig Gleeson,
          Yale University and UCL
  </notes>

  <cell id="L5PCtemplate_0_0">
    <notes>Cell: L5PCtemplate_0_0 exported from NEURON ModelView</notes>
    <morphology id="morphology">
<!-- Section: L5PCtemplate[0].soma[0] (segmentGroup: soma_0) which has 21 3D points, so 20 segment(s)-->
      <segment id="0" name = "Seg0_soma_0">
        <proximal x="34.1634" y="17.6215" z="-50.25" diameter="3.80039"/>
        <distal x="35.3196" y="17.6937" z="-50.25" diameter="6.44373"/>
      </segment>
      <segment id="2" name = "Seg1_soma_0">
        <parent segment="0"/>
        <distal x="36.4758" y="17.766" z="-50.25" diameter="9.60449"/>
      </segment>
      <segment id="3" name = "Seg2_soma_0">
        <parent segment="2"/>
        <distal x="37.632" y="17.8382" z="-50.25" diameter="12.1828"/>
      </segment>
      <segment id="4" name = "Seg3_soma_0">
        <parent segment="3"/>
        <distal x="38.7883" y="17.9104" z="-50.25" diameter="14.0603"/>
      </segment>
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
<!-- Section: L5PCtemplate[0].soma[0] (segmentGroup: soma_0) which has 21 3D points, so 20 segment(s)-->

      <segmentGroup id = "soma_0"  neuroLexId="sao864921383">
         <notes>This group contains an unbranched set of segments, and all of the segmentGroups marked with
             neuroLexId = sao864921383 form a non-overlapping set of all of the segments.
             These segmentGroups correspond to the 'cables' of NeuroML v1.8.1, and map to/from NEURON sections.</notes>
        <member segment = "0"/>
        <member segment = "2"/>
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      </segmentGroup>

<!-- Section: L5PCtemplate[0].axon[0] (segmentGroup: axon_0) which has 3 3D points, so 2 segment(s)-->

      <segmentGroup id = "axon_0"  neuroLexId="sao864921383">
         <notes>This group contains an unbranched set of segments, and all of the segmentGroups marked with
             neuroLexId = sao864921383 form a non-overlapping set of all of the segments.
             These segmentGroups correspond to the 'cables' of NeuroML v1.8.1, and map to/from NEURON sections.</notes>
        <member segment = "4067"/>
        <member segment = "4068"/>
      </segmentGroup>

<!-- Section: L5PCtemplate[0].apic[0] (segmentGroup: apic_0) which has 13 3D points, so 12 segment(s)-->

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
    </morphology>
  </cell>

  <network id="network" type="networkWithTemperature" temperature="6 degC">
    <population id="Pop_L5PCtemplate_0_0" component="L5PCtemplate_0_0" size="1" type="populationList">
        <instance id="0">
            <location x="0" y="0" z="0"/>
        </instance>
    </population>
  </network>

</neuroml>
