<Lems>

    <!--

        This LEMS file has been automatically generated using PyNeuroML v0.7.6 (libNeuroML v0.4.2)

     -->

    <!-- Specify which component to run -->
    <Target component="iv_HL5PC"/>

    <!-- Include core NeuroML2 ComponentType definitions -->
    <Include file="Cells.xml"/>
    <Include file="Networks.xml"/>
    <Include file="Simulation.xml"/>

    <Include file="net_20221212113130_HL5PC_1_027_S_per_m2_0_050_nA.net.nml"/>
    <Include file="../../../cells/SkinnerLabHL5PC//channels/CaDynamics_E2_NML2.nml"/>
    <Include file="../../../cells/SkinnerLabHL5PC//channels/CaDynamics_E2_NML2__decay460__gamma5_01Emin4.nml"/>
    <Include file="../../../cells/SkinnerLabHL5PC//channels/pas.channel.nml"/>
    <Include file="../../../cells/SkinnerLabHL5PC//channels/SK_E2.channel.nml"/>
    <Include file="../../../cells/SkinnerLabHL5PC//channels/SKv3_1.channel.nml"/>
    <Include file="../../../cells/SkinnerLabHL5PC//channels/K_Tst.channel.nml"/>
    <Include file="../../../cells/SkinnerLabHL5PC//channels/K_Pst.channel.nml"/>
    <Include file="../../../cells/SkinnerLabHL5PC//channels/Ih.channel.nml"/>
    <Include file="../../../cells/SkinnerLabHL5PC//channels/NaTa_t.channel.nml"/>
    <Include file="../../../cells/SkinnerLabHL5PC//channels/Nap_Et2.channel.nml"/>
    <Include file="../../../cells/SkinnerLabHL5PC//channels/Ca_HVA.channel.nml"/>
    <Include file="../../../cells/SkinnerLabHL5PC//channels/Ca_LVAst.channel.nml"/>
    <Include file="../../../cells/SkinnerLabHL5PC//channels/Im.channel.nml"/>
    <Include file="iv_HL5PC.net.nml"/>

    <Simulation id="iv_HL5PC" length="2800ms" step="0.05ms" target="network_of_HL5PC" seed="12345">  <!-- Note seed: ensures same random numbers used every run -->

        <Display id="Voltage_display" title="Voltages" timeScale="1ms" xmin="-280.0" xmax="3080.0000000000005" ymin="-90" ymax="50">
            <Line id="v_cell0" quantity="population_of_HL5PC[0]/v" scale="1mV" color="#3f1bc5" timeScale="1ms"/>
            <Line id="v_cell1" quantity="population_of_HL5PC[1]/v" scale="1mV" color="#623614" timeScale="1ms"/>
            <Line id="v_cell2" quantity="population_of_HL5PC[2]/v" scale="1mV" color="#722909" timeScale="1ms"/>
            <Line id="v_cell3" quantity="population_of_HL5PC[3]/v" scale="1mV" color="#bc4210" timeScale="1ms"/>
            <Line id="v_cell4" quantity="population_of_HL5PC[4]/v" scale="1mV" color="#e69378" timeScale="1ms"/>
            <Line id="v_cell5" quantity="population_of_HL5PC[5]/v" scale="1mV" color="#072ae2" timeScale="1ms"/>
            <Line id="v_cell6" quantity="population_of_HL5PC[6]/v" scale="1mV" color="#15d7ce" timeScale="1ms"/>
            <Line id="v_cell7" quantity="population_of_HL5PC[7]/v" scale="1mV" color="#5dc6dd" timeScale="1ms"/>
        </Display>

        <OutputFile id="Volts_file" fileName="iv_HL5PC.v.dat">
            <OutputColumn id="v_cell0" quantity="population_of_HL5PC[0]/v"/>
            <OutputColumn id="v_cell1" quantity="population_of_HL5PC[1]/v"/>
            <OutputColumn id="v_cell2" quantity="population_of_HL5PC[2]/v"/>
            <OutputColumn id="v_cell3" quantity="population_of_HL5PC[3]/v"/>
            <OutputColumn id="v_cell4" quantity="population_of_HL5PC[4]/v"/>
            <OutputColumn id="v_cell5" quantity="population_of_HL5PC[5]/v"/>
            <OutputColumn id="v_cell6" quantity="population_of_HL5PC[6]/v"/>
            <OutputColumn id="v_cell7" quantity="population_of_HL5PC[7]/v"/>
        </OutputFile>

    </Simulation>

</Lems>
