<neuroml xmlns="http://www.neuroml.org/schema/neuroml2"  xmlns:xs="http://www.w3.org/2001/XMLSchema" xmlns:xsi="http://www.w3.org/2001/XMLSchema-instance" xsi:schemaLocation="http://www.neuroml.org/schema/neuroml2 https://raw.github.com/NeuroML/NeuroML2/development/Schemas/NeuroML2/NeuroML_v2.3.xsd" id="net_20221212114222_L5PC_0_0_S_per_m2_0_5_nA">
    <include href="../../../cells/HayEtAlL5PC//channels/CaDynamics_E2_NML2.nml"/>
    <include href="../../../cells/HayEtAlL5PC//channels/CaDynamics_E2_NML2__decay460__gamma5_01Emin4.nml"/>
    <include href="../../../cells/HayEtAlL5PC//channels/CaDynamics_E2_NML2__decay122__gamma5_09Emin4.nml"/>
    <include href="../../../cells/HayEtAlL5PC//channels/pas.channel.nml"/>
    <include href="../../../cells/HayEtAlL5PC//channels/SK_E2.channel.nml"/>
    <include href="../../../cells/HayEtAlL5PC//channels/SKv3_1.channel.nml"/>
    <include href="../../../cells/HayEtAlL5PC//channels/K_Tst.channel.nml"/>
    <include href="../../../cells/HayEtAlL5PC//channels/K_Pst.channel.nml"/>
    <include href="../../../cells/HayEtAlL5PC//channels/Ih.channel.nml"/>
    <include href="../../../cells/HayEtAlL5PC//channels/NaTa_t.channel.nml"/>
    <include href="../../../cells/HayEtAlL5PC//channels/Nap_Et2.channel.nml"/>
    <include href="../../../cells/HayEtAlL5PC//channels/Ca_HVA.channel.nml"/>
    <include href="../../../cells/HayEtAlL5PC//channels/Ca_LVAst.channel.nml"/>
    <include href="../../../cells/HayEtAlL5PC//channels/Im.channel.nml"/>
    <cell id="L5PC">
        <notes>Cell: L5PC exported from NEURON ModelView. Reference: Hay E, Hill S, Schürmann F, Markram H, Segev I (2011) Models of Neocortical Layer 5b Pyramidal Cells Capturing a Wide Range of Dendritic and Perisomatic Active Properties. PLOS Computational Biology 7(7): e1002107. https://doi.org/10.1371/journal.pcbi.1002107</notes>
        <morphology id="morphology">
            <segment id="0" name="Seg0_soma_0">
                <proximal x="34.1634" y="17.6215" z="-50.25" diameter="3.80039"/>
                <distal x="35.3196" y="17.6937" z="-50.25" diameter="6.44373"/>
            </segment>
            <segment id="2" name="Seg1_soma_0">
                <parent segment="0"/>
                <distal x="36.4758" y="17.766" z="-50.25" diameter="9.60449"/>
            </segment>
            <segment id="3" name="Seg2_soma_0">
                <parent segment="2"/>
                <distal x="37.632" y="17.8382" z="-50.25" diameter="12.1828"/>
            </segment>
            <segment id="4" name="Seg3_soma_0">
                <parent segment="3"/>
                <distal x="38.7883" y="17.9104" z="-50.25" diameter="14.0603"/>
            </segment>
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            <segmentGroup id="soma_0" neuroLexId="sao864921383">
                <notes>This group contains an unbranched set of segments, and all of the segmentGroups marked with
             neuroLexId = sao864921383 form a non-overlapping set of all of the segments.
             These segmentGroups correspond to the 'cables' of NeuroML v1.8.1, and map to/from NEURON sections.</notes>
                <member segment="0"/>
                <member segment="2"/>
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            </segmentGroup>
            <segmentGroup id="axon_0" neuroLexId="sao864921383">
                <notes>This group contains an unbranched set of segments, and all of the segmentGroups marked with
             neuroLexId = sao864921383 form a non-overlapping set of all of the segments.
             These segmentGroups correspond to the 'cables' of NeuroML v1.8.1, and map to/from NEURON sections.</notes>
                <member segment="4067"/>
                <member segment="4068"/>
            </segmentGroup>
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            <segmentGroup id="basal_dendrite_group" neuroLexId="GO:0030425">
                <notes>Basal dendrites</notes>
                <include segmentGroup="dend_63"/>
                <include segmentGroup="dend_7"/>
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            </segmentGroup>
            <segmentGroup id="apical_dendrite_group" neuroLexId="GO:0030425">
                <notes>Apical dendrite_group</notes>
                <include segmentGroup="apic_63"/>
                <include segmentGroup="apic_64"/>
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                <inhomogeneousParameter id="PathLengthOverApicDends" variable="p" metric="Path Length from root">
                    <proximal translationStart="0.0"/>
                </inhomogeneousParameter>
            </segmentGroup>
            <segmentGroup id="soma_group" neuroLexId="GO:0043025">
                <notes>Default soma segment group for the cell</notes>
                <include segmentGroup="soma_0"/>
            </segmentGroup>
            <segmentGroup id="axon_group" neuroLexId="GO:0030424">
                <notes>Default axon segment group for the cell</notes>
                <include segmentGroup="axon_1"/>
                <include segmentGroup="axon_0"/>
            </segmentGroup>
            <segmentGroup id="dendrite_group" neuroLexId="GO:0030425">
                <notes>Default dendrite segment group for the cell</notes>
                <include segmentGroup="apical_dendrite_group"/>
                <include segmentGroup="basal_dendrite_group"/>
            </segmentGroup>
            <segmentGroup id="all">
                <include segmentGroup="dend_50"/>
                <include segmentGroup="dend_49"/>
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            </segmentGroup>
        </morphology>
        <biophysicalProperties id="biophys">
            <membraneProperties>
                <channelDensity id="pas_all" ionChannel="pas" condDensity="0.0000 S_per_cm2" erev="-90 mV" ion="non_specific"/>
                <channelDensity id="pas_somatic" ionChannel="pas" condDensity="0.0000338 S_per_cm2" erev="-90 mV" segmentGroup="soma_group" ion="non_specific"/>
                <channelDensity id="SK_E2_somatic" ionChannel="SK_E2" condDensity="0.0441 S_per_cm2" erev="-85 mV" segmentGroup="soma_group" ion="k"/>
                <channelDensity id="SKv3_1_somatic" ionChannel="SKv3_1" condDensity="0.693 S_per_cm2" erev="-85 mV" segmentGroup="soma_group" ion="k"/>
                <channelDensity id="K_Tst_somatic" ionChannel="K_Tst" condDensity="0.0812 S_per_cm2" erev="-85 mV" segmentGroup="soma_group" ion="k"/>
                <channelDensity id="K_Pst_somatic" ionChannel="K_Pst" condDensity="0.00223 S_per_cm2" erev="-85 mV" segmentGroup="soma_group" ion="k"/>
                <channelDensity id="Ih_somatic" ionChannel="Ih" condDensity="0.0 S_per_m2" erev="-45 mV" segmentGroup="soma_group" ion="hcn"/>
                <channelDensity id="NaTa_t_somatic" ionChannel="NaTa_t" condDensity="2.04 S_per_cm2" erev="50 mV" segmentGroup="soma_group" ion="na"/>
                <channelDensity id="Nap_Et2_somatic" ionChannel="Nap_Et2" condDensity="0.00172 S_per_cm2" erev="50 mV" segmentGroup="soma_group" ion="na"/>
                <channelDensity id="pas_apical" ionChannel="pas" condDensity="0.0000589 S_per_cm2" erev="-90 mV" segmentGroup="apical_dendrite_group" ion="non_specific"/>
                <channelDensity id="SK_E2_apical" ionChannel="SK_E2" condDensity="0.0012 S_per_cm2" erev="-85 mV" segmentGroup="apical_dendrite_group" ion="k"/>
                <channelDensity id="SKv3_1_apical" ionChannel="SKv3_1" condDensity="0.000261 S_per_cm2" erev="-85 mV" segmentGroup="apical_dendrite_group" ion="k"/>
                <channelDensity id="Im_apical" ionChannel="Im" condDensity="0.0000675 S_per_cm2" erev="-85 mV" segmentGroup="apical_dendrite_group" ion="k"/>
                <channelDensity id="NaTa_t_axonal" ionChannel="NaTa_t" condDensity="0.0213 S_per_cm2" erev="50 mV" segmentGroup="apical_dendrite_group" ion="na"/>
                <channelDensity id="pas_basal" ionChannel="pas" condDensity="0.0000467 S_per_cm2" erev="-90 mV" segmentGroup="basal_dendrite_group" ion="non_specific"/>
                <channelDensity id="Ih_basal" ionChannel="Ih" condDensity="0.0 S_per_m2" erev="-45 mV" segmentGroup="basal_dendrite_group" ion="hcn"/>
                <channelDensity id="pas_axonal" ionChannel="pas" condDensity="0.0000325 S_per_cm2" erev="-90 mV" segmentGroup="axon_group" ion="non_specific"/>
                <channelDensityNernst id="Ca_HVA_somatic" ionChannel="Ca_HVA" condDensity="0.000992 S_per_cm2" segmentGroup="soma_group" ion="ca"/>
                <channelDensityNernst id="Ca_LVAst_somatic" ionChannel="Ca_LVAst" condDensity="0.00343 S_per_cm2" segmentGroup="soma_group" ion="ca"/>
                <channelDensityNonUniform id="Ih_apical" ionChannel="Ih" erev="-45 mV" ion="hcn">
                    <variableParameter parameter="condDensity" segmentGroup="apical_dendrite_group">
                        <inhomogeneousValue inhomogeneousParameter="PathLengthOverApicDends" value="0.0  *  ((2.087 * exp( 3.6161 * (p/1300.5335))) - 0.8696)"/>
                    </variableParameter>
                </channelDensityNonUniform>
                <channelDensityNonUniformNernst id="Ca_LVA_apic" ionChannel="Ca_LVAst" ion="ca">
                    <variableParameter parameter="condDensity" segmentGroup="apical_dendrite_group">
                        <inhomogeneousValue inhomogeneousParameter="PathLengthOverApicDends" value="1E8 * 0.0187 * 1E-4 * (0.01 + (0.99 * (H(p - 685) * H(885 - p))))"/>
                    </variableParameter>
                </channelDensityNonUniformNernst>
                <channelDensityNonUniformNernst id="Ca_HVA_apic" ionChannel="Ca_HVA" ion="ca">
                    <variableParameter parameter="condDensity" segmentGroup="apical_dendrite_group">
                        <inhomogeneousValue inhomogeneousParameter="PathLengthOverApicDends" value="1E8 * 0.000555 * 1E-4 * (0.1 + (0.9 * (H(p - 685) * H(885 - p))))"/>
                    </variableParameter>
                </channelDensityNonUniformNernst>
                <specificCapacitance value="1 uF_per_cm2"/>
                <specificCapacitance value="2 uF_per_cm2" segmentGroup="apical_dendrite_group"/>
                <specificCapacitance value="2 uF_per_cm2" segmentGroup="basal_dendrite_group"/>
                <initMembPotential value="-80mV"/>
            </membraneProperties>
            <intracellularProperties>
                <species id="ca" concentrationModel="CaDynamics_E2_NML2__decay460__gamma5_01Emin4" ion="ca" initialConcentration="5.0E-11 mol_per_cm3" initialExtConcentration="2.0E-6 mol_per_cm3" segmentGroup="soma_group"/>
                <species id="ca" concentrationModel="CaDynamics_E2_NML2__decay122__gamma5_09Emin4" ion="ca" initialConcentration="5.0E-11 mol_per_cm3" initialExtConcentration="2.0E-6 mol_per_cm3" segmentGroup="apical_dendrite_group"/>
                <resistivity value="0.1 kohm_cm"/>
            </intracellularProperties>
        </biophysicalProperties>
    </cell>
    <pulseGenerator id="pulseGen_0" delay="50ms" duration="300ms" amplitude="0.5 nA"/>
    <network id="L5PC_net">
        <population id="L5PC_pop" component="L5PC" size="1"/>
        <explicitInput target="L5PC_pop[0]" input="pulseGen_0"/>
    </network>
</neuroml>
