<Lems>

    <!--

        This LEMS file has been automatically generated using PyNeuroML v0.7.6 (libNeuroML v0.4.2)

     -->

    <!-- Specify which component to run -->
    <Target component="iv_L5PC"/>

    <!-- Include core NeuroML2 ComponentType definitions -->
    <Include file="Cells.xml"/>
    <Include file="Networks.xml"/>
    <Include file="Simulation.xml"/>

    <Include file="net_20221212120520_L5PC_4_0_S_per_m2_0_5_nA.net.nml"/>
    <Include file="../../../cells/HayEtAlL5PC//channels/CaDynamics_E2_NML2.nml"/>
    <Include file="../../../cells/HayEtAlL5PC//channels/CaDynamics_E2_NML2__decay460__gamma5_01Emin4.nml"/>
    <Include file="../../../cells/HayEtAlL5PC//channels/CaDynamics_E2_NML2__decay122__gamma5_09Emin4.nml"/>
    <Include file="../../../cells/HayEtAlL5PC//channels/pas.channel.nml"/>
    <Include file="../../../cells/HayEtAlL5PC//channels/SK_E2.channel.nml"/>
    <Include file="../../../cells/HayEtAlL5PC//channels/SKv3_1.channel.nml"/>
    <Include file="../../../cells/HayEtAlL5PC//channels/K_Tst.channel.nml"/>
    <Include file="../../../cells/HayEtAlL5PC//channels/K_Pst.channel.nml"/>
    <Include file="../../../cells/HayEtAlL5PC//channels/Ih.channel.nml"/>
    <Include file="../../../cells/HayEtAlL5PC//channels/NaTa_t.channel.nml"/>
    <Include file="../../../cells/HayEtAlL5PC//channels/Nap_Et2.channel.nml"/>
    <Include file="../../../cells/HayEtAlL5PC//channels/Ca_HVA.channel.nml"/>
    <Include file="../../../cells/HayEtAlL5PC//channels/Ca_LVAst.channel.nml"/>
    <Include file="../../../cells/HayEtAlL5PC//channels/Im.channel.nml"/>
    <Include file="iv_L5PC.net.nml"/>

    <Simulation id="iv_L5PC" length="2800ms" step="0.05ms" target="network_of_L5PC" seed="12345">  <!-- Note seed: ensures same random numbers used every run -->

        <Display id="Voltage_display" title="Voltages" timeScale="1ms" xmin="-280.0" xmax="3080.0000000000005" ymin="-90" ymax="50">
            <Line id="v_cell0" quantity="population_of_L5PC[0]/v" scale="1mV" color="#3fcdc5" timeScale="1ms"/>
            <Line id="v_cell1" quantity="population_of_L5PC[1]/v" scale="1mV" color="#eb8b82" timeScale="1ms"/>
            <Line id="v_cell2" quantity="population_of_L5PC[2]/v" scale="1mV" color="#f2702a" timeScale="1ms"/>
            <Line id="v_cell3" quantity="population_of_L5PC[3]/v" scale="1mV" color="#e7ec18" timeScale="1ms"/>
            <Line id="v_cell4" quantity="population_of_L5PC[4]/v" scale="1mV" color="#9db395" timeScale="1ms"/>
            <Line id="v_cell5" quantity="population_of_L5PC[5]/v" scale="1mV" color="#ca19bc" timeScale="1ms"/>
            <Line id="v_cell6" quantity="population_of_L5PC[6]/v" scale="1mV" color="#d3f3dc" timeScale="1ms"/>
            <Line id="v_cell7" quantity="population_of_L5PC[7]/v" scale="1mV" color="#75d18d" timeScale="1ms"/>
            <Line id="v_cell8" quantity="population_of_L5PC[8]/v" scale="1mV" color="#1b617a" timeScale="1ms"/>
            <Line id="v_cell9" quantity="population_of_L5PC[9]/v" scale="1mV" color="#6d700d" timeScale="1ms"/>
            <Line id="v_cell10" quantity="population_of_L5PC[10]/v" scale="1mV" color="#6fade5" timeScale="1ms"/>
            <Line id="v_cell11" quantity="population_of_L5PC[11]/v" scale="1mV" color="#1ec008" timeScale="1ms"/>
            <Line id="v_cell12" quantity="population_of_L5PC[12]/v" scale="1mV" color="#13600a" timeScale="1ms"/>
            <Line id="v_cell13" quantity="population_of_L5PC[13]/v" scale="1mV" color="#0f0983" timeScale="1ms"/>
            <Line id="v_cell14" quantity="population_of_L5PC[14]/v" scale="1mV" color="#2be381" timeScale="1ms"/>
            <Line id="v_cell15" quantity="population_of_L5PC[15]/v" scale="1mV" color="#7cc39f" timeScale="1ms"/>
        </Display>

        <OutputFile id="Volts_file" fileName="iv_L5PC.v.dat">
            <OutputColumn id="v_cell0" quantity="population_of_L5PC[0]/v"/>
            <OutputColumn id="v_cell1" quantity="population_of_L5PC[1]/v"/>
            <OutputColumn id="v_cell2" quantity="population_of_L5PC[2]/v"/>
            <OutputColumn id="v_cell3" quantity="population_of_L5PC[3]/v"/>
            <OutputColumn id="v_cell4" quantity="population_of_L5PC[4]/v"/>
            <OutputColumn id="v_cell5" quantity="population_of_L5PC[5]/v"/>
            <OutputColumn id="v_cell6" quantity="population_of_L5PC[6]/v"/>
            <OutputColumn id="v_cell7" quantity="population_of_L5PC[7]/v"/>
            <OutputColumn id="v_cell8" quantity="population_of_L5PC[8]/v"/>
            <OutputColumn id="v_cell9" quantity="population_of_L5PC[9]/v"/>
            <OutputColumn id="v_cell10" quantity="population_of_L5PC[10]/v"/>
            <OutputColumn id="v_cell11" quantity="population_of_L5PC[11]/v"/>
            <OutputColumn id="v_cell12" quantity="population_of_L5PC[12]/v"/>
            <OutputColumn id="v_cell13" quantity="population_of_L5PC[13]/v"/>
            <OutputColumn id="v_cell14" quantity="population_of_L5PC[14]/v"/>
            <OutputColumn id="v_cell15" quantity="population_of_L5PC[15]/v"/>
        </OutputFile>

    </Simulation>

</Lems>
